# Построение трассы КА
# Начальные условия:
# Наклонение орбиты КА:
ii := 98
# Широта КА в точке выведения:
ϕ[0] := 34.7420267
# Начальный угол отсчёта:
λ[0] := 0
# Долгота КА в точке выведения:
α := 90 - ii
du[0] := 0
i := 1 .. 360
du[i] := du[i - 1] + 1
ϕ[i] := 180/π*asin(sin(ϕ[0]*π/180)*cos(du[i]*π/180) + cos(ϕ[0]*π/180)*sin(du[i]*π/180)*cos(α*π/180))
sindλ[i] := sin(α*π/180)*sin(du[i]*π/180)/cos(ϕ[i]*π/180)
cosdλ[i] := (cos(du[i]*π/180) - sin(ϕ[0]*π/180)*sin(ϕ[i]*π/180))/(cos(ϕ[0]*π/180)*cos(ϕ[i]*π/180))
dλ[i] := angle(cosdλ[i], sindλ[i])*180/π
λ[i] := λ[0] + dλ[i]
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